// SBML level 3 version 1

model Module_11(Ca, Ca1, Ca2)
  // Calcium
  // model units - substance: substance, time: time, volume: volume, area: area, length: length, extent: substance

  // Compartments:
  compartment cell = 1 litre;

  // Species:
  species $Ca in cell = 0.01;  // substance in mole
  species $Ca1 in cell = 0.1;  // substance in mole
  species $Ca2 in cell = 0.1;  // substance in mole

  // Parameters:
  _quantity_to_number_factor = 6.02214179e20; _quantity_to_number_factor is ""quantity to number factor"";
  a = 50;

  // Rate rules:
  Ca' = -5*Ca + a*(1 + Ca1);
  Ca1' = 100*Ca2;
  Ca2' = -100*Ca1;

  // Events:
  Calcium_trigger: at (5) after (Ca > 0.04), fromTrigger=false: a = 0;

  // Unit definitions:
  unit length = metre;
  unit area = metre^2;
  unit volume = litre;
  unit time = second;
  unit substance = 1e-6 mole;
end

function Rxn2(A1, A2, c1, c2, c3)
  c1 - c3*A1 - c2*A1 + 2*c3*A2;
end

function Rxn3(A1, A2, A3, c2, c3)
  c2*A1 - 2*c3*A2 - 1.8*c2*A2 + 3*c3*A3;
end

function Rxn7(A5, A6, A7, c2, c3)
  2.8*c2*A5 - 6*c3*A6 - 2.7*c2*A6 + 7*c3*A7;
end

function Rxn10(A10, A8, A9, c2, c3)
  1.8*c2*A8 - 9*c3*A9 - c2*A9 + 10*c3*A10;
end

function Rxn9(A7, A8, A9, c2, c3)
  2.3*c2*A7 - 8*c3*A8 - 1.8*c2*A8 + 9*c3*A9;
end

function Rxn8(A6, A7, A8, c2, c3)
  2.7*c2*A6 - 7*c3*A7 - 2.3*c2*A7 + 8*c3*A8;
end

function Rxn11(A10, A9, c2, c3)
  c2*A9 - c3*10*A10;
end

function Rxn4(A2, A3, A4, c2, c3)
  1.8*c2*A2 - 3*c3*A3 - 2.3*c2*A3 + 4*c3*A4;
end

function Rxn5(A3, A4, A5, c2, c3)
  2.3*c2*A3 - 4*c3*A4 - 2.7*c2*A4 + 5*c3*A5;
end

function Rxn6(A4, A5, A6, c2, c3)
  2.7*c2*A4 - 5*c3*A5 - 2.8*c2*A5 + 6*c3*A6;
end

function Rxn1(A1, c1, c3)
  -c1 + c3*A1;
end

model Module_12(Ca, P10)
  // calmodulin
  // model units - substance: substance, time: time, volume: volume, area: area, length: length, extent: substance

  // Compartments:
  compartment cell = 1 litre;

  // Species:
  species Ca in cell = 0.01;  // substance in mole
  species P0 in cell = 10;  // substance in mole
  species P1 in cell = 0;  // substance in mole
  species P2 in cell = 0;  // substance in mole
  species P3 in cell = 0;  // substance in mole
  species P4 in cell = 0;  // substance in mole
  species P5 in cell = 0;  // substance in mole
  species P6 in cell = 0;  // substance in mole
  species P7 in cell = 0;  // substance in mole
  species P8 in cell = 0;  // substance in mole
  species P9 in cell = 0;  // substance in mole
  species P10 in cell = 0;  // substance in mole
  species $Ep in cell = 0;  // substance in mole
  species $I in cell = 0;  // substance in mole

  // Parameters:
  k1 = 0.5;
  k2 = 2;
  k3 = 1;
  k4 = 1*10^(-3);
  Km = 10;
  KHI = 4;
  ep0 = 0.01;
  I0 = 0.1;
  Vcan = 1;
  Vpka = 1;
  KH2 = 0.6;

  // Assignment rules:
  v1 := 10*k1*(Ca/KHI)^8*P0/(1 + (Ca/KHI)^4)^2;
  sum := 1*P1 + 2*P2 + 3*P3 + 4*P4 + 5*P5 + 6*P6 + 7*P7 + 8*P8 + 9*P9 + 10*P10;
  v3 := k2*Ep/(Km + sum);
  v2 := k1*(Ca/KHI)^4*P1/(1 + (Ca/KHI)^4);

  // Rate rules:
  Ep' = -k3*I*Ep + k4*(ep0 - Ep);
  I' = -k3*I*Ep + k4*(ep0 - Ep) + Vpka*I0 - Vcan*(Ca/KH2)^3*I/(1 + (Ca/KH2)^3);

  // Reactions:
  _1: => P0; cell*Rxn1(P1, v1, v3);  // modifiers: P1
  _2: => P1; cell*Rxn2(P1, P2, v1, v2, v3);  // modifiers: P2
  _3: => P2; cell*Rxn3(P1, P2, P3, v2, v3);  // modifiers: P1, P3
  _4: => P3; cell*Rxn4(P2, P3, P4, v2, v3);  // modifiers: P2, P4
  _5: => P4; cell*Rxn5(P3, P4, P5, v2, v3);  // modifiers: P3, P5
  _6: => P5; cell*Rxn6(P4, P5, P6, v2, v3);  // modifiers: P4, P6
  _7: => P6; cell*Rxn7(P5, P6, P7, v2, v3);  // modifiers: P5, P7
  _8: => P7; cell*Rxn8(P6, P7, P8, v2, v3);  // modifiers: P6, P8
  _9: => P8; cell*Rxn9(P7, P8, P9, v2, v3);  // modifiers: P7, P9
  _10: => P9; cell*Rxn10(P10, P8, P9, v2, v3);  // modifiers: P10, P8
  _11: => P10; cell*Rxn11(P10, P9, v2, v3);  // modifiers: P9

  // Unit definitions:
  unit length = metre;
  unit area = metre^2;
  unit volume = litre;
  unit time = second;
  unit substance = 1e-6 mole;
end

model Module_10()
  // Long_Term_Potentiation
  // model units - substance: substance, time: time, volume: volume, area: area, length: length, extent: substance

  // Sub-modules:
  Calcium: Module_11();
  calmodulin: Module_12();

  // Compartments:
  compartment cell = 1 litre; Calcium.cell is cell; calmodulin.cell is cell;

  // Species:
  species Ca in cell = 0; Calcium.Metabolite_3 is Ca; calmodulin.Metabolite_9 is Ca;  // substance in mole

  // Unit definitions:
  unit length = metre;
  unit area = metre^2;
  unit volume = litre;
  unit time = second;
  unit substance = 1e-6 mole;
end
